*Heading
 Gregoire 3PB CDM UMAT
** Job name: Gregoire_3PB Model name: Gregoire_3PB
** Generated by: Abaqus/CAE 2024
*Preprint, echo=NO, model=NO, history=NO, contact=NO
**
** PARTS
**
*Part, name=Beam2D
*Node
      1,         300.,         100.
      2,         300.,           0.
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*Element, type=CPS3
   1,    1,   21, 1691
   2, 1691,  368,    1
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*Nset, nset=_G3, internal, generate
     1,  28477,      1
*Elset, elset=_G3, internal, generate
     1,  56216,      1
*Nset, nset=Support_Left
 14,
*Nset, nset=Support_Right
 2,
*Nset, nset=Load_Nodes
    7,   10, 1613, 1614, 1615, 1616, 1617, 1618, 1619, 1620, 1621
*Nset, nset=CMOD1
 17,
*Nset, nset=CMOD2
 20,
** Section: BeamSec
*Solid Section, elset=_G3, material=Concrete
50.,
*End Part
**
**
** ASSEMBLY
**
*Assembly, name=Assembly
**
*Instance, name=BeamInst, part=Beam2D
*End Instance
**
*Nset, nset=CMOD1, instance=BeamInst
 17,
*Nset, nset=CMOD2, instance=BeamInst
 20,
*Nset, nset=Load_Nodes, instance=BeamInst
    7,   10, 1613, 1614, 1615, 1616, 1617, 1618, 1619, 1620, 1621
*Nset, nset=Support_Left, instance=BeamInst
 14,
*Nset, nset=Support_Right, instance=BeamInst
 2,
*End Assembly
**
** MATERIALS
**
*Material, name=Concrete
*Depvar
      2,
*User Material, constants=5
37000.,  0.2,  3.5, 0.09,  10.
** ----------------------------------------------------------------
**
** STEP: Loading
**
*Step, name=Loading, nlgeom=NO, inc=20000
*Static
0.0005, 1., 1e-10, 0.0005
**
** BOUNDARY CONDITIONS
**
** Name: BC_Load Type: Displacement/Rotation
*Boundary
Load_Nodes, 2, 2, -0.1
** Name: BC_SupL Type: Displacement/Rotation
*Boundary
Support_Left, 1, 1
Support_Left, 2, 2
** Name: BC_SupR Type: Displacement/Rotation
*Boundary
Support_Right, 2, 2
**
** OUTPUT REQUESTS
**
*Restart, write, frequency=0
**
** FIELD OUTPUT: F-Output-1
**
*Output, field, variable=PRESELECT
**
** FIELD OUTPUT: F-SDV
**
*Output, field, frequency=100
*Element Output, directions=YES
SDV,
**
** HISTORY OUTPUT: H-CMOD1
**
*Output, history
*Node Output, nset=CMOD1
U1,
**
** HISTORY OUTPUT: H-CMOD2
**
*Node Output, nset=CMOD2
U1,
**
** HISTORY OUTPUT: H-Load
**
*Node Output, nset=Load_Nodes
RF2,
**
** HISTORY OUTPUT: H-Output-1
**
*Output, history, variable=PRESELECT
*End Step
